// COMSOL Multiphysics 6.4.0.293 model "acoustic_rectangular_cavity.mph"
// Outline of the model tree

Parameters
  Lx = 4[m]  // Cavity length
  Ly = 3[m]  // Cavity width
  c_air = 343[m/s]  // Speed of sound
  rho_air = 1.225[kg/m^3]  // Air density
  f_shift = 35[Hz]  // Eigenfrequency search shift
  hmax = c_air/(6*120[Hz])  // Maximum mesh size at 120 Hz
  f10_ref = c_air/(2*Lx)  // Analytical (1,0) mode
  f01_ref = c_air/(2*Ly)  // Analytical (0,1) mode
  f11_ref = c_air/2*sqrt((1/Lx)^2+(1/Ly)^2)  // Analytical (1,1) mode
  f20_ref = c_air/Lx  // Analytical (2,0) mode

Geometry
  geom1 "几何 1" (2D, length unit m)
    r1: Rectangle "矩形 1" | size = {Lx, Ly}
    fin: Finalize "形成联合体"

Materials
  mat1: Common "Air" on all domains
    def: def "基本"
      density = rho_air
      soundspeed = c_air

Physics
  acpr: PressureAcoustics "压力声学，频域" on all domains
    dependent variable p
    fpam1: FrequencyPressureAcousticsModel "压力声学 1" (default)
    shb1: SoundHard "硬声场边界（壁） 1" (default)
    init1: init "初始值 1" (default)

Mesh
  mesh1 "网格 1"
    size: MeshSizeDefault "大小" | hmax = 0.268; hmin = 0.0012; hcurve = 0.3; hgrad = 1.3
    size1: Size "大小 1" on entire geometry | hmax = hmax; custom = on
    ftri1: FreeTri "自由三角形网格 1" on remaining entities

Studies
  std1 "研究 1"
    eig: Eigenfrequency "特征频率" | neigs = 8; shift = f_shift

Solver configurations
  sol1 "解 1" (study std1)
    v1: Variables "因变量 1"
    e1: Eigenvalue "特征值求解器 1"
      dDef: Direct "直接"

Datasets
  dset1: Solution | solution = sol1

Plots
  pg_acoustic_test: PlotGroup2D "Acoustic Pressure Eigenmode" | data = dset1
    surf1: Surface "表面 1" | expr = p; descr = Acoustic pressure